# -*- lammps -*-
#
# The next example is a 3-body model.  The init file is a little
# more complicated, and we've introduced repulsion between particles 2
# and 3

# Here and henceforth, lines that were introduced earlier have been
# collapsed without comments.

units		lj
boundary	f f f
atom_style	atomic
read_data 3b.init

# We must consider boundary conditions.  With fixed boundaries ('f'
# above) the simulation has no meaning outside the box.  If an atom
# wanders outside the box, LAMMPS will halt with a "lost atom" error
# message.  This is the first of typical errors you might get.

# The following 'fix' specifies mirror-like reflection of a trajectory at each wall:

#fix W all wall/reflect xlo EDGE xhi EDGE ylo EDGE yhi EDGE zlo EDGE zhi EDGE

# As an exercise, comment out the fix comment above with a hash mark
# '#' and run LAMMPS.

# For our model, particles 2 and 3 'orbit' particle 1 and have a
# different strength interaction with each other

pair_style yukawa 0.00001 50.0
pair_coeff * * 0.0 50.0
pair_coeff 1 2 -20.0 50.0
pair_coeff 1 3 -20.0 50.0
pair_coeff 2 3 -5.0 20.0

dump	I all image 50000 *.jpg type type size 1000 1000 view 60 120
dump_modify I backcolor white boxcolor black
dump_modify I backcolor white boxcolor black
dump_modify I acolor 1 red
dump_modify I acolor 2 blue
dump_modify I acolor 3 green
dump_modify I adiam 1 10.0
dump_modify I adiam 2 5.0
dump_modify I adiam 3 5.0

dump	M all movie 500 movie.mp4 type type size 1000 1000 view 60 120
dump_modify M backcolor white boxcolor black
dump_modify M acolor 1 red
dump_modify M acolor 2 blue
dump_modify M acolor  3 green
dump_modify M adiam 1 10.0
dump_modify M adiam 2 5.0
dump_modify M adiam 3 5.0

fix F1 all nve

run 200000
