# 3d Lennard-Jones

units           lj
atom_style      atomic
boundary	p p p # periodic boundary conditions por extended system

# define the box here

# set up a simple cubic lattice on which to put the particles
# initially (this avoids having to enter hundreds or thousands of
# positions by hand!)

# we can require a concentration, in this case 0.7 atoms per cubic LJ unit
lattice         sc 0.3

# define a variable temperature

variable T equal 1.50

# set up an interaction volume here (instead of in the init data file)

# first define a region (we can define any number of these)
region          myregion block 0 10 0 10 0 10
# now define the simulation volume to be myregion, with the number of atom types
create_box      1 myregion
# now 'create' the atoms according to the lattice in the box, in this case only 1 type
create_atoms    1 box

# LAMMPS will create a volume containing 5x5x5 = 125 atoms, in a
# volume whose dimensions are scaled such that there is a
# concentration of 0.7 per cubic LJ unit

# we can define masses here as well, one for each type
mass            1 1.0

# as an initial condition, we can give each particle (atom) a random
# initial velocity, corresonding to a temperature T (in this case
# 0.90, in LJ units), and a random number seed (87287)

# velocity        all create $T 87287

# for this example, we will truncate the LJ potential at the edge of the repulsive core, approximating a gas of hard spheres

pair_style      lj/cut 3.0 # default cutoff
pair_coeff	1 1 1.0 1.0 3.0 # the last number overrides the cutoff

neighbor        0.3 bin
neigh_modify    every 20 delay 0 check yes

compute myRDF all rdf 100


fix		F1 all nve/limit 0.1
fix		lang all langevin $T $T 10.0 10235

fix 		7 all ave/time 100000 1 100000 c_myRDF[*] file g.dat mode vector

dump    I all image 100000 *.jpg type type size 1000 1000 view 60 120
dump_modify I backcolor white boxcolor black
dump_modify I adiam 1 0.3

dump    M all movie 1000 movie.mp4 type type size 1000 1000 view 60 120
dump_modify M backcolor white boxcolor black
dump_modify M adiam 1 0.3

thermo		10000
thermo_style	custom step temp pe ke etotal
timestep	0.01
run		500000
