# -*- lammps -*-
#
# This third example in a series on polymers intoduces two new components:

# * FENE bond potentials
# * 'soft' interactions

# While a harmonic * (spring) potential wll always keep a repeating
# unit from escaping * its bond, in reality a unit does not stray very
# far from its bond * distance.

# The finite extensible nonlinear elastic (FENE) potential was
# introduced to address this issue.  It has a logarthmic singularity
# at some limiting distance of the bond.

# This can work in numerical simulations (and it was introduced for
# this purpose), but there is a catch:

# The simulation system must be set up in a way that repeat unit
# positions do not exceed the FENE bond limit, or there will be a
# numerical singularity and LAMMPS will crash.

# There is another difficulty in simulating such a system.  Typically
# long polymers are folded up into tight spaces, all the while
# respecting the bond length.  Setting this up as an initial condition
# can be quite challenging.

# As a way to address these issues, one can pre-condition the system
# so that the repeat units are close to their constrained positions.

# We do this with a combination of "soft" potentials and confined initial conditions.

# 1. Soft potentials: unphysical, but serve to guide the system into an
# allowed 'initial' configuration

# 2. Constrained positions: put the repeating units in straight lines
# with very short separations so that they fit into the simulation
# volume.  This is also unphysical, but as the system evolves via the
# soft potentials, the system will reach a point where units have the
# correct separations.

# 1 & 2 are then applied for some 'appropriate' number of time steps,
# and then the 'real' interactions are turned on.

units lj
boundary f f f
atom_style molecular

# This file contains the initial constrained positions

read_data poly.init

fix W all wall/reflect xlo EDGE xhi EDGE ylo EDGE yhi EDGE zlo EDGE zhi EDGE

include softinteractions

variable T equal 1

neighbor 1.0 multi

# this is a slow-motion movie, evaluated every 10 steps, and terminating after 1000 steps
dump		M1 all movie 10 movie-slow.mp4 type type size 1000 1000 shiny 1.0
dump_modify	M1 backcolor white
dump_modify	M1 boxcolor black
dump_modify	M1 acolor 2 red
dump_modify	M1 acolor 1 blue
dump_modify	M1 adiam * 0.10
dump_modify	M1 bdiam * 0.01

dump		M2 all movie 10 movie.mp4 type type size 1000 1000 shiny 1.0
dump_modify	M2 backcolor white
dump_modify	M2 boxcolor black
dump_modify	M2 acolor 2 red
dump_modify	M2 acolor 1 blue
dump_modify	M2 adiam * 0.10
dump_modify	M2 bdiam * 0.01

# add a request for still images every 5000 steps
dump		I1 all image 5000 *.jpg type type size 1000 1000 shiny 1.0
dump_modify	I1 backcolor white
dump_modify	I1 boxcolor black
dump_modify	I1 acolor 2 red
dump_modify	I1 acolor 1 blue
dump_modify	I1 adiam * 0.10
dump_modify	I1 bdiam * 0.01

thermo 1000
thermo_style custom step temp pe ke

fix 1 all nve/limit 0.05
fix 2 all langevin $T $T 1.0 8147237

run 1000

undump M1

run 1000

include interactions

unfix 1
fix 1 all nve/limit 0.05

timestep 0.01

run 18000
